*Heading
** Job name: fine_pattern Model name: Model-1
** Generated by: Abaqus/CAE Unofficial Packaging Version
*Preprint, echo=NO, model=NO, history=NO, contact=NO
**
** PARTS
**
*Part, name=Part-1
*End Part
**
**
** ASSEMBLY
**
*Assembly, name=Assembly
**
*Instance, name=Part-1-1, part=Part-1
*Node, nset=nall
      1,  0.100000001,           0.
      2,  0.100000001,  0.100000001
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*User element, nodes=4, type=U1, properties=3, coordinates=2, variables=7, UNSYMM
1,2,11,12
*Element, type=U1, Elset=ALL
 1,    1,  679, 4577,  690
 2,  679,  680, 4578, 4577
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*UEL Property, Elset=ALL
0.05
*Nset, nset=Full, generate
     1,  10201,      1
*Elset, elset=Full, generate
     1,  10000,      1
*Nset, nset=Edge_L1
    3,    4,    8,   13,   19,   26
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*Elset, elset=Edge_L1
   13,   14,   15,   16,   33,   37
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*Nset, nset=Edge_L2
  331,  332,  359,  384,  408,  431
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*Elset, elset=Edge_L2
 4436, 4440, 4444, 4448, 4849, 4853
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*Nset, nset=Edge_L3
  301,  304,  334,  360,  385,  409
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*Elset, elset=Edge_L3
 4049, 4053, 4057, 4061, 4452, 4456
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*Nset, nset=Edge_L4
    1,    4,    5,    9,   14,   20
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*Elset, elset=Edge_L4
    1,    5,    9,   13,   20,   24
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*Nset, nset=Set-1
    1,    2,    3,    4,  679,  680
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*Elset, elset=Set-1, generate
  1,  16,   1
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*Element, type=CPS4R, ELSET=dummy
*include,input=dummy_elements.txt
*Elset, ELSET=dummy, generate
10001, 20000,  1
** Section: Section-1
*Solid Section, elset=dummy, material=Material-1
1.,
** Section: Section-1
*Solid Section, elset=Full, material=Material-1
,
*End Instance
**
*Nset, nset=ct_pt_l1, instance=Part-1-1
 119,
*Nset, nset=ct_pt_l4, instance=Part-1-1
 104,
*Elset, elset=dummy, instance=Part-1-1,generate
10001, 20000, 1
*End Assembly
**
** MATERIALS
**
*Material, name=Material-1
*Elastic
1e-20, 0.3
*User output variables
10,
** ----------------------------------------------------------------
**
** STEP: Step-1
**
*Step, name=Step-1, nlgeom=YES, inc=10000
*Static, stabilize=0.0002, allsdtol=0.05, continue=NO
0.0001, 1., 1e-30, 0.01
**
** BOUNDARY CONDITIONS
**
** Name: BC-1 Type: Symmetry/Antisymmetry/Encastre
*Boundary
Part-1-1.Edge_L1, XSYMM
** Name: BC-3 Type: Displacement/Rotation
*Boundary
Part-1-1.Edge_L3, 1, 1, 5.0
** Name: BC-4 Type: Symmetry/Antisymmetry/Encastre
*Boundary
Part-1-1.Edge_L4, YSYMM
** Name: BC-5 Type: Displacement/Rotation
*Boundary
Part-1-1.Edge_L2, 2, 2, 5.0
** Name: BC-6 Type: Displacement/Rotation
*Boundary
ct_pt_l4, 1, 1
** Name: BC-7 Type: Displacement/Rotation
*Boundary
ct_pt_l1, 2, 2
**
** CONTROLS
**
*Controls, reset
*Controls, parameters=time incrementation
, , , , , , , 30, , ,
**
** OUTPUT REQUESTS
**
*Restart, write, frequency=0
**
** FIELD OUTPUT: F-Output-1
**
*Output, field, variable=PRESELECT
*element output, elset=dummy
uvarm1,uvarm2,uvarm3,uvarm4,uvarm5,uvarm6,uvarm7,uvarm8,uvarm9,uvarm10
**,uvarm6,uvarm7,uvarm8
*Output, history, variable=PRESELECT
*End Step
